# OpenSim document version 40000
Model CAD_template:
  gravity: 0 0 0
  credits: Alastair Quinn
  publications: No
  length_units: meters
  force_units: N
  Ground: meshes=
  BodySet:
    Body radius: mass=0.23359 [kg] mass_center=(0.0336341 -0.181559 0.0156)
        inertia=(0.00043855 8.859e-5 0.00040258 3.014e-5 -4.24e-6 6.418e-5) meshes=rad_stl.stl
    Body scaphoid: mass=0.0001 mass_center=(0 0 0) inertia=(1e-5 1e-5 1e-5 0 0 0) meshes=sca_stl.stl
    Body lunate: mass=0.5819 mass_center=(-0.00301314 -0.0424993 -0.00112205)
        inertia=(0.00011 6e-5 0.00015 9e-7 -2e-7 1.2e-5) meshes=lun_stl.stl
    Body hand_complete: mass=0.0001 mass_center=(0 0 0) inertia=(0.00011 6e-5 0.00015 9e-7 -2e-7 1.2e-5)
        meshes=mc3_stl.stl
  JointSet:
    CustomJoint radioulnar: socket_parent_frame=ground_offset socket_child_frame=radius_offset
      Coordinate uln_xrot: default_value=0 range=(-3.14159 3.14159) clamped=false
      Coordinate uln_yrot: default_value=0 range=(-3.14159 3.14159) clamped=false
      Coordinate uln_zrot: default_value=0 range=(-3.14159 3.14159) clamped=false
      Coordinate uln_xtran: default_value=0 range=(-10 10) clamped=false
      Coordinate uln_ytran: default_value=0 range=(-10 10) clamped=false
      Coordinate uln_ztran: default_value=0 range=(-10 10) clamped=false
      PhysicalOffsetFrame ground_offset: socket_parent=/ground translation=(0 0 0) [meters]
          orientation=(0 0 -3.141) [radians]
      PhysicalOffsetFrame radius_offset: socket_parent=/bodyset/radius translation=(0 0 0)
      SpatialTransform:
        TransformAxis rotation1: coordinates=uln_xrot axis=(1 0 0) LinearFunction(coefficients=1 0)
        TransformAxis rotation2: coordinates=uln_yrot axis=(0 1 0) LinearFunction(coefficients=1 0)
        TransformAxis rotation3: coordinates=uln_zrot axis=(0 0 1) LinearFunction(coefficients=1 0)
        TransformAxis translation1: coordinates=uln_xtran axis=(1 0 0) LinearFunction(coefficients=1 0)
        TransformAxis translation2: coordinates=uln_ytran axis=(0 1 0) LinearFunction(coefficients=1 0)
        TransformAxis translation3: coordinates=uln_ztran axis=(0 0 1) LinearFunction(coefficients=1 0)
    CustomJoint radial_scaphoid: socket_parent_frame=radius_offset socket_child_frame=scaphoid_offset
      Coordinate sca_xrot: default_value=0 range=(-3.14159 3.14159) clamped=false
      Coordinate sca_yrot: default_value=0 range=(-3.14159 3.14159) clamped=false
      Coordinate sca_zrot: default_value=0 range=(-3.14159 3.14159) clamped=false
      Coordinate sca_xtran: default_value=0 range=(-10 10) clamped=false
      Coordinate sca_ytran: default_value=0 range=(-10 10) clamped=false
      Coordinate sca_ztran: default_value=0 range=(-10 10) clamped=false
      PhysicalOffsetFrame radius_offset: socket_parent=/bodyset/radius translation=(0.0068852 0.0110236 -0.0201316)
      PhysicalOffsetFrame scaphoid_offset: socket_parent=/bodyset/scaphoid translation=(0 0 0)
      SpatialTransform:
        TransformAxis rotation1: coordinates=sca_xrot axis=(1 0 0) LinearFunction(coefficients=1 0)
        TransformAxis rotation2: coordinates=sca_yrot axis=(0 1 0) LinearFunction(coefficients=1 0)
        TransformAxis rotation3: coordinates=sca_zrot axis=(0 0 1) LinearFunction(coefficients=1 0)
        TransformAxis translation1: coordinates=sca_xtran axis=(1 0 0) LinearFunction(coefficients=1 0)
        TransformAxis translation2: coordinates=sca_ytran axis=(0 1 0) LinearFunction(coefficients=1 0)
        TransformAxis translation3: coordinates=sca_ztran axis=(0 0 1) LinearFunction(coefficients=1 0)
    CustomJoint scaphoid_lunate: socket_parent_frame=scaphoid_offset socket_child_frame=lunate_offset
      Coordinate lunate_flexion: default_value=0 range=(-3.14159 3.14159) clamped=false
      Coordinate lunate_deviation: default_value=0 range=(-3.14159 3.14159) clamped=false
      Coordinate lunate_rotation: default_value=0 range=(-3.14159 3.14159) clamped=false
      Coordinate lunate_xtrans: default_value=0 range=(-10 10) clamped=false
      Coordinate lunate_ytrans: default_value=0 range=(-10 10) clamped=false
      Coordinate lunate_ztrans: default_value=0 range=(-10 10) clamped=false
      PhysicalOffsetFrame scaphoid_offset: socket_parent=/bodyset/scaphoid
          translation=(-0.0163721 -0.0066396 0.0034413)
      PhysicalOffsetFrame lunate_offset: socket_parent=/bodyset/lunate translation=(0 0 0)
      SpatialTransform:
        TransformAxis rotation1: coordinates=lunate_flexion axis=(1 0 0) LinearFunction(coefficients=1 0)
        TransformAxis rotation2: coordinates=lunate_deviation axis=(0 1 0) LinearFunction(coefficients=1 0)
        TransformAxis rotation3: coordinates=lunate_rotation axis=(0 0 1) LinearFunction(coefficients=1 0)
        TransformAxis translation1: coordinates=lunate_xtrans axis=(1 0 0) LinearFunction(coefficients=1 0)
        TransformAxis translation2: coordinates=lunate_ytrans axis=(0 1 0) LinearFunction(coefficients=1 0)
        TransformAxis translation3: coordinates=lunate_ztrans axis=(0 0 1) LinearFunction(coefficients=1 0)
    CustomJoint hand_wrist: socket_parent_frame=scaphoid_offset socket_child_frame=hand_complete_offset
      Coordinate hand_flexion: default_value=0 range=(-3.14159 3.14159) clamped=false
      Coordinate hand_deviation: default_value=0 range=(-3.14159 3.14159) clamped=false
      Coordinate hand_rotation: default_value=0 range=(-3.14159 3.14159) clamped=false
      Coordinate hand_xtrans: default_value=0 range=(-1 1) clamped=false
      Coordinate hand_ytrans: default_value=0 range=(-1 1) clamped=false
      Coordinate hand_ztrans: default_value=0 range=(-1 1) clamped=false
      PhysicalOffsetFrame scaphoid_offset: socket_parent=/bodyset/scaphoid
          translation=(0.0064094 -0.0077043 -0.0551146)
      PhysicalOffsetFrame hand_complete_offset: socket_parent=/bodyset/hand_complete translation=(0 0 0)
      SpatialTransform:
        TransformAxis rotation1: coordinates=hand_flexion axis=(1 0 0) LinearFunction(coefficients=1 0)
        TransformAxis rotation2: coordinates=hand_deviation axis=(0 1 0) LinearFunction(coefficients=1 0)
        TransformAxis rotation3: coordinates=hand_rotation axis=(0 0 1) LinearFunction(coefficients=1 0)
        TransformAxis translation1: coordinates=hand_xtrans axis=(1 0 0) LinearFunction(coefficients=1 0)
        TransformAxis translation2: coordinates=hand_ytrans axis=(0 1 0) LinearFunction(coefficients=1 0)
        TransformAxis translation3: coordinates=hand_ztrans axis=(0 0 1) LinearFunction(coefficients=1 0)
  MarkerSet:
    Marker marker0: scaphoid (-0.02123551 -0.06133044 -0.06836711)
    Marker marker1: scaphoid (-0.004931846 -0.05877974 -0.04886991)
    Marker marker2: scaphoid (0.01601146 -0.07173414 -0.05739088)
    Marker marker3: lunate (-0.01118933 -0.05482925 -0.02130863)
    Marker marker4: hand_complete (0.03207966 -0.0467516 0.001600193)
    Marker marker5: radius (0.02486988 -0.04880798 0.03581802)
    Marker marker6: hand_complete (0.05004449 -0.04602178 -0.01742793)
    Marker marker7: hand_complete (0.04440079 -0.06049406 0.01955457)
    Marker marker8: radius (0.01037025 -0.0689045 0.05129519)
    Marker marker9: radius (0.04510273 -0.04561843 0.05212841)
    Marker marker10: lunate (-0.01420827 -0.05966248 -0.04777212)
    Marker marker11: lunate (-0.02653467 -0.07409347 -0.01244986)
